*Heading
** Job name: 81_Brick_Model_SUB02 Model name: 81_Brick_Model_SUB02
** Generated by: Abaqus/CAE 6.10-1
*Preprint, echo=NO, model=NO, history=NO, contact=NO
**
** PARTS
**
*Part, name=FB
*Node
      1, 0.0478952378,  -0.12260174,  0.907000005
      2, 0.0478952378,  -0.12260174,           0.
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*Element, type=C3D8R
 1, 153, 160, 758, 737,   1,   2, 129, 134
 2, 737, 758, 759, 738, 134, 129, 130, 133
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*Nset, nset=_PickedSet93, internal, generate
   1,  1672,    1
*Elset, elset=_PickedSet93, internal, generate
  1,  711,   1
** Section: FB_Section
*Solid Section, elset=_PickedSet93, material=FB_Graphite
,
*End Part
**
**
** ASSEMBLY
**
*Assembly, name=Assembly
**
*Instance, name=FB1(0)(0), part=FB
          0.,           0.,           0.
          0.,           0.,           0.,           0.,           0.,          -1., 45.0000005824897
*End Instance
**
*Instance, name=FB2(0)(0), part=FB
0.461670017436697,  2.77555756156289e-17,           0.
0.461670017436697,  2.77555756156289e-17,           0., 0.461670017436697,  2.77555756156289e-17,          -1., 45.0000005824897
*End Instance
**
*End Assembly
**
** MATERIALS
**
*Material, name=FB_Graphite
*Density
 1687.71,
*Elastic
 1.18e+10, 0.21
