*Heading
** Job name: MODEL04 Model name: MODEL04
** Generated by: Abaqus/CAE 6.11-1
*Preprint, echo=NO, model=NO, history=NO, contact=NO
**
** PARTS
**
*Part, name=CUBE
*Node
      1,         8.75,        18.75,          20.
      2,         8.75,       -13.75,          20.
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*Element, type=C3D10
  1,  83,  75,  84,  85, 122, 121, 120, 124, 123, 125
  2,  85,  46,  84,  86, 127, 126, 125, 129, 128, 130
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*Nset, nset=_PickedSet2, internal, generate
   1,  719,    1
*Elset, elset=_PickedSet2, internal, generate
   1,  402,    1
** Section: DUMMY_SECTION
*Solid Section, elset=_PickedSet2, material=DUMMY_MAT
,
*End Part
**
**
** ASSEMBLY
**
*Assembly, name=Assembly
**
*Instance, name=CUBE-1, part=CUBE
*End Instance
**
*End Assembly
**
** MATERIALS
**
*Material, name=DUMMY_MAT
*Density
1.,
*Elastic
 1e+09, 0.25
**
** PHYSICAL CONSTANTS
**
*Physical Constants, absolute zero=0., stefan boltzmann=0.
