*Heading
** Job name: MODEL06 Model name: MODEL06
** Generated by: Abaqus/CAE 6.11-1
*Preprint, echo=NO, model=NO, history=NO, contact=NO
**
** PARTS
**
*Part, name=CUBE
*Node
      1,        -8.75,       -13.75,          20.
      2,        -8.75,        18.75,          20.
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*Element, type=C3D6
 1, 53, 52, 13, 91, 90, 65
 2, 53, 13, 14, 91, 65, 66
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*Element, type=C3D10
 49,  95,   1,  13,  22, 115, 114, 113, 117, 116, 118
 50,  95,  13,   1,  48, 113, 114, 115, 120, 119, 121
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*Nset, nset=_PickedSet2, internal, generate
   1,  455,    1
*Elset, elset=_PickedSet2, internal, generate
   1,  268,    1
*Nset, nset=SURF001
   2,   3,   6,   7,   9,  12
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*Elset, elset=SURF001
   5,   6,   7,  29,  30,  31
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*Nset, nset=SURF002
   1,   2,   5,   6,   9,  10
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*Elset, elset=SURF002
   2,   5,  12,  19,  26,  29
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*Nset, nset=SURF003
   5,   6,   7,   8,   9,  10
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*Elset, elset=SURF003
  25,  26,  27,  28,  29,  30
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** Section: DUMMY_SECTION
*Solid Section, elset=_PickedSet2, material=DUMMY_MAT
,
*End Part
**
**
** ASSEMBLY
**
*Assembly, name=Assembly
**
*Instance, name=CUBE-1, part=CUBE
*End Instance
**
*Elset, elset=__MixOrder0_CUBE-1_M_S1, internal, instance=CUBE-1, generate
  1,  24,   1
*Surface, type=ELEMENT, name=_MixOrder0_CUBE-1_M, internal
__MixOrder0_CUBE-1_M_S1, S1
*Elset, elset=__MixOrder0_CUBE-1_S_S3, internal, instance=CUBE-1
  49,  58, 120, 162, 164, 176
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*Elset, elset=__MixOrder0_CUBE-1_S_S2, internal, instance=CUBE-1
 102, 189, 255
*Elset, elset=__MixOrder0_CUBE-1_S_S4, internal, instance=CUBE-1
  70, 203
*Surface, type=ELEMENT, name=_MixOrder0_CUBE-1_S, internal
__MixOrder0_CUBE-1_S_S3, S3
__MixOrder0_CUBE-1_S_S2, S2
__MixOrder0_CUBE-1_S_S4, S4
*Tie, name=_MixOrder0_CUBE-1, adjust=no
_MixOrder0_CUBE-1_S, _MixOrder0_CUBE-1_M
*End Assembly
**
** MATERIALS
**
*Material, name=DUMMY_MAT
*Density
1.,
*Elastic
 1e+09, 0.25
**
** PHYSICAL CONSTANTS
**
*Physical Constants, absolute zero=0., stefan boltzmann=0.
