*Heading
** Job name: MODEL08 Model name: MODEL08
** Generated by: Abaqus/CAE 6.11-1
*Preprint, echo=NO, model=NO, history=NO, contact=NO
**
** PARTS
**
*Part, name=CUTOUTCUBE
*Node
      1,        -8.75,       -13.75,          20.
      2,        -8.75,        18.75,          20.
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*Element, type=C3D20R
 1,  66,  67,  98,  97,  15,  16,  58,  57, 112, 111, 110, 109, 113, 114, 115,
    116, 118, 117, 119, 120
 2,  67,  20,  63,  98,  16,   1,  17,  58, 123, 122, 121, 111, 124, 125, 126,
    114, 117, 127, 128, 119
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*Nset, nset=_PickedSet2, internal, generate
   1,  361,    1
*Elset, elset=_PickedSet2, internal, generate
  1,  51,   1
*Nset, nset=SURF001
   2,   3,   7,   9,  11,  12
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*Elset, elset=SURF001
  5,  8,  9, 19, 22, 26, 28, 29, 30, 31, 32, 33
*Nset, nset=SURF002
   1,   2,   5,   6,   7,  12
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*Elset, elset=SURF002
  2,  3,  4,  5, 13, 15
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*Nset, nset=SURF003
   5,   6,   8,  10,  11,  12
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*Elset, elset=SURF003
 13, 14, 15, 16, 23, 27
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*Nset, nset=SURF4
   6,   7,   8,   9,  32,  33
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*Elset, elset=SURF4, generate
 15,  26,   1
** Section: DUMMY_SECTION
*Solid Section, elset=_PickedSet2, material=DUMMY_MAT
,
*End Part
**
**
** ASSEMBLY
**
*Assembly, name=Assembly
**
*Instance, name=CUBE-1, part=CUTOUTCUBE
*End Instance
**
*Instance, name=CUTOUTCUBE-1, part=CUTOUTCUBE
        38.5,           0.,           0.
*End Instance
**
*End Assembly
**
** MATERIALS
**
*Material, name=DUMMY_MAT
*Density
1.,
*Elastic
 1e+09, 0.25
**
** PHYSICAL CONSTANTS
**
*Physical Constants, absolute zero=0., stefan boltzmann=0.
